// SBML level 3 version 2

model example()

  // Compartments:
  compartment Blood;
  compartment Liver;
  compartment Rest;
  compartment Gut = 1;
  compartment Urine = 1;

  // Species:
  substanceOnly species AG_P in Gut = 0;
  substanceOnly species AL_P in Liver = 0;
  substanceOnly species AB_P in Blood = 0;
  substanceOnly species AR_P in Rest = 0;
  substanceOnly species AUrine_P in Urine = 0;
  substanceOnly species AG_M in Gut = 0;
  substanceOnly species AL_M in Liver = 0;
  substanceOnly species AB_M in Blood = 0;
  substanceOnly species AR_M in Rest = 0;
  substanceOnly species AUrine_M in Urine = 0;

  // Parameters:
  BW = 70;
  VRc = 0.9003;
  VLc = 0.0257;
  VBc = 0.074;
  QRc = 0.773;
  QLc = 0.227;
  rho = 1;
  PL_P = 2;
  PR_P = 1.2;
  CLmet_P = 50;
  CLurine_P = 0;
  Ka_P = 0.05;
  PL_M = 1.4;
  PR_M = 0.5;
  CLurine_M = 20;

  // Assignment rules:
  Blood := BW*VBc/rho;
  Liver := BW*VLc/rho;
  Rest := BW*VRc/rho;
  QC := 15*BW^0.74;
  QL := QC*QLc;
  QR := QC*QRc;

  // Reactions:
  _J0: AG_P -> AL_P; AG_P*Ka_P;
  _J1: AB_P -> AL_P; QL*AB_P/Blood;
  _J2: AL_P -> AB_P; QL*(AL_P/Liver)/PL_P;
  _J3: AB_M -> AL_M; QL*AB_M/Blood;
  _J4: AL_M -> AB_M; QL*(AL_M/Liver)/PL_M;
  _J5: AB_P -> AR_P; QR*AB_P/Blood;
  _J6: AR_P -> AB_P; QR*(AR_P/Rest)/PR_P;
  _J7: AB_M -> AR_M; QR*AB_M/Blood;
  _J8: AR_M -> AB_M; QR*(AR_M/Rest)/PR_M;
  _J9: AB_P -> AUrine_P; AB_P/Blood*CLurine_P;
  _J10: AB_M -> AUrine_M; AB_M/Blood*CLurine_M;
  _J11: AL_P -> AL_M; CLmet_P*(AL_P/Liver)/PL_P;
end
