// SBML level 3 version 2

model simple()
  // model units - substance: MicroGM, time: HR, volume: L, extent: MicroGM

  // Compartments:
  compartment Blood; Blood has L; Blood is "blood compartment";
  compartment Liver; Liver has L; Liver is "liver compartment";
  compartment Rest; Rest has L; Rest is "rest-of-body compartment";
  compartment Gut = 1 L; Gut is "gut compartment";
  compartment Urine = 1 L; Urine is "urine compartment";

  // Species:
  substanceOnly species ABlood in Blood = 0; ABlood is "amount of chemical in blood";
  substanceOnly species ALiver in Liver = 0; ALiver is "amount of chemical in liver";
  substanceOnly species ARest in Rest = 0; ARest is "amount of chemical in rest-of-body";
  substanceOnly species AGut in Gut = 0; AGut is "amount of chemical in gut";
  substanceOnly species AUrine in Urine = 0; AUrine is "amount of chemical in urine";

  // Parameters:
  BW = 70 KiloGM; BW is "body weight";
  VRc = 0.9003 UNITLESS; VRc is "rest-of-body as fraction of total bodyweight";
  VLc = 0.0257 UNITLESS; VLc is "liver as fraction of total bodyweight";
  VBc = 0.074 UNITLESS; VBc is "blood as fraction of total bodyweight";
  QRc = 0.773 UNITLESS;
  QLc = 0.227 UNITLESS;
  rho = 1 KiloGM_PER_L;
  PCLiver = 2 UNITLESS;
  PCRest = 1.2 UNITLESS;
  CLUrine = 1 L_PER_HR;
  Ka = 0.05 PER_H;
  QC has L_PER_HR;
  QL has L_PER_HR;
  QR has L_PER_HR;

  // Assignment rules:
  Blood := BW*VBc/rho;
  Liver := BW*VLc/rho;
  Rest := BW*VRc/rho;
  QC := 15*BW^0.74;
  QL := QC*QLc;
  QR := QC*QRc;

  // Reactions:
  _J0: AGut -> ALiver; AGut*Ka;
  _J1: ABlood -> ALiver; QL*ABlood/Blood;
  _J2: ALiver -> ABlood; QL*(ALiver/Liver)/PCLiver;
  _J3: ABlood -> ARest; QR*ABlood/Blood;
  _J4: ARest -> ABlood; QR*(ARest/Rest)/PCRest;
  _J5: ABlood -> AUrine; ABlood/Blood*CLUrine;

  // Unit definitions:
  unit MicroGM = 1e-6 gram;
  unit HR = 3600 second;
  unit L = litre;
  unit KiloGM = 1000 gram;
  unit UNITLESS = dimensionless;
  unit KiloGM_PER_L = 1000 gram / litre;
  unit L_PER_HR = litre / (3600 second);
  unit PER_H = 1 / (3600 second);
end
