// SBML level 3 version 2

model simple_metab()
  // model units - substance: MicroGM, time: HR, volume: L, extent: MicroGM

  // Compartments:
  compartment Blood; Blood has L; Blood is "blood compartment";
  compartment Liver; Liver has L; Liver is "liver compartment";
  compartment Rest; Rest has L; Rest is "rest-of-body compartment";
  compartment Gut = 1 L; Gut is "gut compartment";
  compartment Urine = 1 L; Urine is "urine compartment";

  // Species:
  substanceOnly species AGut_P in Gut = 0;
  substanceOnly species ALiver_P in Liver = 0;
  substanceOnly species ABlood_P in Blood = 0;
  substanceOnly species ARest_P in Rest = 0;
  substanceOnly species AUrine_P in Urine = 0;
  substanceOnly species AGut_M in Gut = 0;
  substanceOnly species ALiver_M in Liver = 0;
  substanceOnly species ABlood_M in Blood = 0;
  substanceOnly species ARest_M in Rest = 0;
  substanceOnly species AUrine_M in Urine = 0;

  // Parameters:
  BW = 70 KiloGM; BW is "body weight";
  scVRest = 0.9003 UNITLESS;
  scVLiver = 0.0257 UNITLESS;
  scVBlood = 0.074 UNITLESS;
  scQRest = 0.773 UNITLESS;
  scQLiver = 0.227 UNITLESS;
  rho = 1 KiloGM_PER_L;
  PCLiver_P = 2 UNITLESS;
  PCRest_P = 1.2 UNITLESS;
  CLmet_P = 50 L_PER_HR;
  CLurine_P = 0 L_PER_HR;
  Ka_P = 0.05 PER_H;
  PCLiver_M = 1.4 UNITLESS;
  PCRest_M = 0.5 UNITLESS;
  CLurine_M = 20 L_PER_HR;
  QBlood has L_PER_HR;
  QLiver has L_PER_HR;
  QRest has L_PER_HR;

  // Assignment rules:
  Blood := BW*scVBlood/rho;
  Liver := BW*scVLiver/rho;
  Rest := BW*scVRest/rho;
  QBlood := 15*BW^0.74;
  QLiver := QBlood*scQLiver;
  QRest := QBlood*scQRest;

  // Reactions:
  _J0: AGut_P -> ALiver_P; AGut_P*Ka_P;
  _J1: ABlood_P -> ALiver_P; QLiver*ABlood_P/Blood;
  _J2: ALiver_P -> ABlood_P; QLiver*(ALiver_P/Liver)/PCLiver_P;
  _J3: ABlood_M -> ALiver_M; QLiver*ABlood_M/Blood;
  _J4: ALiver_M -> ABlood_M; QLiver*(ALiver_M/Liver)/PCLiver_M;
  _J5: ABlood_P -> ARest_P; QRest*ABlood_P/Blood;
  _J6: ARest_P -> ABlood_P; QRest*(ARest_P/Rest)/PCRest_P;
  _J7: ABlood_M -> ARest_M; QRest*ABlood_M/Blood;
  _J8: ARest_M -> ABlood_M; QRest*(ARest_M/Rest)/PCRest_M;
  _J9: ABlood_P -> AUrine_P; ABlood_P/Blood*CLurine_P;
  _J10: ABlood_M -> AUrine_M; ABlood_M/Blood*CLurine_M;
  _J11: ALiver_P -> ALiver_M; CLmet_P*(ALiver_P/Liver)/PCLiver_P;

  // Unit definitions:
  unit MicroGM = 1e-6 gram;
  unit HR = 3600 second;
  unit L = litre;
  unit KiloGM = 1000 gram;
  unit UNITLESS = dimensionless;
  unit KiloGM_PER_L = 1000 gram / litre;
  unit L_PER_HR = litre / (3600 second);
  unit PER_H = 1 / (3600 second);
end
