// SBML level 3 version 2

model simple_metab()

  // Compartments:
  compartment Blood;
  compartment Liver;
  compartment Rest;
  compartment Gut = 1;
  compartment Urine = 1;

  // Species:
  substanceOnly species AGut_P in Gut = 0;
  substanceOnly species ALiver_P in Liver = 0;
  substanceOnly species ABlood_P in Blood = 0;
  substanceOnly species ARest_P in Rest = 0;
  substanceOnly species AUrine_P in Urine = 0;
  substanceOnly species AGut_M in Gut = 0;
  substanceOnly species ALiver_M in Liver = 0;
  substanceOnly species ABlood_M in Blood = 0;
  substanceOnly species ARest_M in Rest = 0;
  substanceOnly species AUrine_M in Urine = 0;

  // Parameters:
  BW = 70;
  scVRest = 0.9003;
  scVLiver = 0.0257;
  scVBlood = 0.074;
  scQRest = 0.773;
  scQLiver = 0.227;
  rho = 1;
  PCLiver_P = 2;
  PCRest_P = 1.2;
  CLmet_P = 50;
  CLurine_P = 0;
  Ka_P = 0.05;
  PCLiver_M = 1.4;
  PCRest_M = 0.5;
  CLurine_M = 20;

  // Assignment rules:
  Blood := BW*scVBlood/rho;
  Liver := BW*scVLiver/rho;
  Rest := BW*scVRest/rho;
  QBlood := 15*BW^0.74;
  QLiver := QBlood*scQLiver;
  QRest := QBlood*scQRest;

  // Reactions:
  _J0: AGut_P -> ALiver_P; AGut_P*Ka_P;
  _J1: ABlood_P -> ALiver_P; QLiver*ABlood_P/Blood;
  _J2: ALiver_P -> ABlood_P; QLiver*(ALiver_P/Liver)/PCLiver_P;
  _J3: ABlood_M -> ALiver_M; QLiver*ABlood_M/Blood;
  _J4: ALiver_M -> ABlood_M; QLiver*(ALiver_M/Liver)/PCLiver_M;
  _J5: ABlood_P -> ARest_P; QRest*ABlood_P/Blood;
  _J6: ARest_P -> ABlood_P; QRest*(ARest_P/Rest)/PCRest_P;
  _J7: ABlood_M -> ARest_M; QRest*ABlood_M/Blood;
  _J8: ARest_M -> ABlood_M; QRest*(ARest_M/Rest)/PCRest_M;
  _J9: ABlood_P -> AUrine_P; ABlood_P/Blood*CLurine_P;
  _J10: ABlood_M -> AUrine_M; ABlood_M/Blood*CLurine_M;
  _J11: ALiver_P -> ALiver_M; CLmet_P*(ALiver_P/Liver)/PCLiver_P;
end
