// SBML level 3 version 2

model simple_dermal()
  // hasProperty CHEBI:24431
  // hasTaxon taxonomy:40674
  // model units - substance: MicroGM, time: HR, volume: L, extent: MicroGM

  // Compartments:
  compartment Skin; Skin has L; Skin is "skin";
  compartment Blood; Blood has L; Blood is "blood";
  compartment Liver; Liver has L; Liver is "liver";
  compartment Rest; Rest has L; Rest is "rest-of-body";
  compartment Urine = 1 L; Urine is "urine";

  // Species:
  substanceOnly species ASkin in Skin = 0; ASkin is "amount of chemical in skin";
  substanceOnly species ABlood in Blood = 0; ABlood is "amount of chemical in blood";
  substanceOnly species ALiver in Liver = 0; ALiver is "amount of chemical in liver";
  substanceOnly species ARest in Rest = 0; ARest is "amount of chemical in rest-of-body";
  substanceOnly species AUrine in Urine = 0; AUrine is "amount of chemical in urine";

  // Parameters:
  BW = 70 KiloGM; BW is "body weight";
  BSA = 190 DeciM2; BSA is "body surface area";
  VBody = 1 L_PER_KiloGM; VBody is "total body density";
  VBc = 0.074 L_PER_KiloGM; VBc is "blood as fraction of total bodyweight";
  VLc = 0.0257 L_PER_KiloGM; VLc is "liver as fraction of total bodyweight";
  FSkinExposed = 0.1 UNITLESS; FSkinExposed is "fraction of skin exposed";
  SkinThickness = 0.1 DeciM; SkinThickness is "skin thickness";
  QCC = 15 L_PER_HR_PER_KiloGM0P75; QCC is "cardiac output as function of body weight";
  QRc = 0.715 UNITLESS; QRc is "fraction of blood flow to rest-of-body";
  QLc = 0.227 UNITLESS; QLc is "fraction of blood flow to liver";
  QSkc = 0.058 UNITLESS; QSkc is "fraction of blood flow to skin";
  PCLiver = 2 UNITLESS; PCLiver is "partition coefficient liver:blood";
  PCRest = 1.2 UNITLESS; PCRest is "partition coefficient rest:blood";
  PCSkin = 0.1 UNITLESS; PCSkin is "partition coefficient skin:blood";
  CLUrine = 10 L_PER_HR; CLUrine is "urinary excretion rate";
  QC has L_PER_HR; QC is "cardiac output";
  QL has L_PER_HR; QL is "blood flow to liver";
  QR has L_PER_HR; QR is "blood flow to rest-of-body";
  QSk has L_PER_HR; QSk is "blood flow to skin";

  // Assignment rules:
  Skin := BSA*FSkinExposed*SkinThickness;
  Blood := BW*VBc;
  Liver := BW*VLc;
  Rest := BW*VBody - Blood - Liver - Skin;
  QC := QCC*BW^0.75;
  QL := QC*QLc;
  QR := QC*QRc;
  QSk := QC*QSkc;

  // Reactions:
  _J0: ASkin -> ABlood; QSk*(ASkin/Skin)/PCSkin;
  _J1: ABlood -> ALiver; QL*(ABlood/Blood);
  _J2: ALiver -> ABlood; QL*(ALiver/Liver)/PCLiver;
  _J3: ABlood -> ARest; QR*(ABlood/Blood);
  _J4: ABlood -> ASkin; QSk*(ABlood/Blood);
  _J5: ARest -> ABlood; QR*(ARest/Rest)/PCRest;
  _J6: ABlood -> AUrine; ABlood/Blood*CLUrine;

  // Unit definitions:
  unit MicroGM = 1e-6 gram;
  unit HR = 3600 second;
  unit L = litre;
  unit KiloGM = 1000 gram;
  unit DeciM2 = (0.1 metre)^2;
  unit L_PER_KiloGM = litre / (1000 gram);
  unit UNITLESS = dimensionless;
  unit DeciM = 0.1 metre;
  unit L_PER_HR_PER_KiloGM0P75 = litre / (3600 second * (1000 gram)^0.75);
  unit L_PER_HR = litre / (3600 second);
end
