// SBML level 3 version 2

model simple_dermal()

  // Compartments:
  compartment Skin;
  compartment Blood;
  compartment Liver;
  compartment Rest;
  compartment Urine = 1;

  // Species:
  substanceOnly species ASkin in Skin = 0;
  substanceOnly species ABlood in Blood = 0;
  substanceOnly species ALiver in Liver = 0;
  substanceOnly species ARest in Rest = 0;
  substanceOnly species AUrine in Urine = 0;

  // Parameters:
  BW = 70;
  BSA = 190;
  VBody = 1;
  VBc = 0.074;
  VLc = 0.0257;
  FSkinExposed = 0.1;
  SkinThickness = 0.1;
  QCC = 15;
  QRc = 0.715;
  QLc = 0.227;
  QSkc = 0.058;
  PCLiver = 2;
  PCRest = 1.2;
  PCSkin = 0.1;
  CLUrine = 10;

  // Assignment rules:
  Skin := BSA*FSkinExposed*SkinThickness;
  Blood := BW*VBc;
  Liver := BW*VLc;
  Rest := BW*VBody - Blood - Liver - Skin;
  QC := QCC*BW^0.75;
  QL := QC*QLc;
  QR := QC*QRc;
  QSk := QC*QSkc;

  // Reactions:
  _J0: ASkin -> ABlood; QSk*(ASkin/Skin)/PCSkin;
  _J1: ABlood -> ALiver; QL*(ABlood/Blood);
  _J2: ALiver -> ABlood; QL*(ALiver/Liver)/PCLiver;
  _J3: ABlood -> ARest; QR*(ABlood/Blood);
  _J4: ABlood -> ASkin; QSk*(ABlood/Blood);
  _J5: ARest -> ABlood; QR*(ARest/Rest)/PCRest;
  _J6: ABlood -> AUrine; ABlood/Blood*CLUrine;
end
