// SBML level 3 version 2

model simple_inhalation()
  // model units - substance: MicroGM, time: HR, volume: L, extent: MicroGM

  // Compartments:
  compartment Alveolar; Alveolar has L; Alveolar is "alveolar air";
  compartment Blood; Blood has L; Blood is "blood";
  compartment Liver; Liver has L; Liver is "liver";
  compartment Rest; Rest has L; Rest is "rest-of-body";
  compartment Urine = 1 L; Urine is "urine";

  // Species:
  substanceOnly species $AAlv in Alveolar = 0; AAlv is "amount of chemical in alveolar air";
  substanceOnly species ABlood in Blood = 0; ABlood is "amount of chemical in blood";
  substanceOnly species ALiver in Liver = 0; ALiver is "amount of chemical in liver";
  substanceOnly species ARest in Rest = 0; ARest is "amount of chemical in rest-of-body";
  substanceOnly species AUrine in Urine = 0; AUrine is "amount of chemical in urine";

  // Parameters:
  BW = 70 KiloGM; BW is "body weight";
  VAlvc = 0.03 L_PER_KiloGM; VAlvc is "alveolar air volume as fraction of bodyweight";
  VLc = 0.0257 L_PER_KiloGM; VLc is "liver volume as fraction of bodyweight";
  VBc = 0.074 L_PER_KiloGM; VBc is "blood volume as fraction of bodyweight";
  VRc = 0.9003 L_PER_KiloGM; VRc is "rest-of-body volume as fraction of bodyweight";
  QCC = 15 L_PER_HR_PER_KiloGM0P75; QCC is "cardiac output as function of body weight";
  QRc = 0.773 UNITLESS; QRc is "fraction of blood flow to rest-of-body";
  QLc = 0.227 UNITLESS; QLc is "fraction of blood flow to liver";
  PCLiver = 2 UNITLESS; PCLiver is "partition coefficient liver:blood";
  PCRest = 1.2 UNITLESS; PCRest is "partition coefficient rest:blood";
  PCAir = 1e99 UNITLESS; PCAir is "partition coefficient blood over air";
  CLUrine = 10 L_PER_HR; CLUrine is "urinary excretion rate";
  QC has L_PER_HR; QC is "cardiac output";
  QL has L_PER_HR; QL is "blood flow to liver";
  QR has L_PER_HR; QR is "blood flow to rest-of-body";
  Falv = 252 L_PER_HR; Falv is "alveolar ventilation rate";

  // Assignment rules:
  Alveolar := BW*VAlvc;
  Blood := BW*VBc;
  Liver := BW*VLc;
  Rest := BW*VRc;
  QC := QCC*BW^0.75;
  QL := QC*QLc;
  QR := QC*QRc;

  // Reactions:
  _J0: ABlood -> $AAlv; Falv*(ABlood/Blood)/PCAir;
  _J1: $AAlv -> ABlood; QC*(AAlv/Alveolar);
  _J2: ABlood -> ALiver; QL*ABlood/Blood;
  _J3: ALiver -> ABlood; QL*(ALiver/Liver)/PCLiver;
  _J4: ABlood -> ARest; QR*ABlood/Blood;
  _J5: ARest -> ABlood; QR*(ARest/Rest)/PCRest;
  _J6: ABlood -> AUrine; ABlood/Blood*CLUrine;

  // Unit definitions:
  unit MicroGM = 1e-6 gram;
  unit HR = 3600 second;
  unit L = litre;
  unit KiloGM = 1000 gram;
  unit L_PER_KiloGM = litre / (1000 gram);
  unit L_PER_HR_PER_KiloGM0P75 = litre / (3600 second * (1000 gram)^0.75);
  unit UNITLESS = dimensionless;
  unit L_PER_HR = litre / (3600 second);
end
