// SBML level 3 version 2

model simple_inhalation()

  // Compartments:
  compartment Alveolar;
  compartment Blood;
  compartment Liver;
  compartment Rest;
  compartment Urine = 1;

  // Species:
  substanceOnly species $AAlv in Alveolar = 0;
  substanceOnly species ABlood in Blood = 0;
  substanceOnly species ALiver in Liver = 0;
  substanceOnly species ARest in Rest = 0;
  substanceOnly species AUrine in Urine = 0;

  // Parameters:
  BW = 70;
  VAlvc = 0.03;
  VLc = 0.0257;
  VBc = 0.074;
  VRc = 0.9003;
  QCC = 15;
  QRc = 0.773;
  QLc = 0.227;
  PCLiver = 2;
  PCRest = 1.2;
  PCAir = 1e99;
  CLUrine = 10;
  Falv = 252;

  // Assignment rules:
  Alveolar := BW*VAlvc;
  Blood := BW*VBc;
  Liver := BW*VLc;
  Rest := BW*VRc;
  QC := QCC*BW^0.75;
  QL := QC*QLc;
  QR := QC*QRc;

  // Reactions:
  _J0: ABlood -> $AAlv; Falv*(ABlood/Blood)/PCAir;
  _J1: $AAlv -> ABlood; QC*(AAlv/Alveolar);
  _J2: ABlood -> ALiver; QL*ABlood/Blood;
  _J3: ALiver -> ABlood; QL*(ALiver/Liver)/PCLiver;
  _J4: ABlood -> ARest; QR*ABlood/Blood;
  _J5: ARest -> ABlood; QR*(ARest/Rest)/PCRest;
  _J6: ABlood -> AUrine; ABlood/Blood*CLUrine;
end
