// SBML level 3 version 2

function f_BW(age, BW_birth, BW_adult, k_growth)
  BW_adult*exp(ln(BW_birth/BW_adult)*exp(-k_growth*age));
end

model simple_lifetime()
  // Simple lifetime PBK model with dynamic BW.
  // model units - substance: MicroGM, time: HR, volume: L, extent: MicroGM

  // Compartments:
  compartment Gut; Gut has L; Gut is "gut";
  compartment Blood; Blood has L; Blood is "blood";
  compartment Liver; Liver has L; Liver is "liver";
  compartment Rest; Rest has L; Rest is "rest-of-body";
  compartment Urine; Urine has L; Urine is "urine";

  // Species:
  substanceOnly species AGut in Gut = 0; AGut is "amount of chemical in gut";
  substanceOnly species ABlood in Blood = 0; ABlood is "amount of chemical in blood";
  substanceOnly species ALiver in Liver = 0; ALiver is "amount of chemical in liver";
  substanceOnly species ARest in Rest = 0; ARest is "amount of chemical in rest-of-body";
  substanceOnly species AUrine in Urine = 0; AUrine is "amount of chemical in urine";

  // Parameters:
  AgeInit = 10 YR; AgeInit is "age at start of simulation";
  BWRef = 50 KiloGM; BWRef is "body weight of reference indvididual in simulation";
  AgeRef = 18 YR; AgeRef is "current age of reference indvididual in simulation";
  Age = AgeInit; Age has YR; Age is "age during simulation";
  BWBirth = 3.5 KiloGM; BWBirth is "population nominal body weight at birth";
  BWAdult = 70 KiloGM; BWAdult is "population nominal asymptotic/mature body weight";
  kGrowth = 0.2 PER_HR; kGrowth is "bodyweight growth-rate constant";
  deltaBW has UNITLESS; deltaBW is "relative body weight of reference individual compared to population nominal body weight";
  BW has KiloGM; BW is "body weight during simulation";
  VRc = 0.9003 L_PER_KiloGM; VRc is "rest-of-body as fraction of total bodyweight";
  VLc = 0.0257 L_PER_KiloGM; VLc is "liver as fraction of total bodyweight";
  VBc = 0.074 L_PER_KiloGM; VBc is "blood as fraction of total bodyweight";
  QCC = 15 L_PER_HR_PER_KiloGM0P75; QCC is "cardiac output as function of body weight";
  QRc = 0.773 UNITLESS; QRc is "fraction of blood flow to rest-of-body";
  QLc = 0.227 UNITLESS; QLc is "fraction of blood flow to liver";
  PCLiver = 2 UNITLESS; PCLiver is "partition coefficient liver:blood";
  PCRest = 1.2 UNITLESS; PCRest is "partition coefficient rest:blood";
  CLUrine = 10 L_PER_HR; CLUrine is "urinary excretion rate";
  Ka = 0.05 PER_HR; Ka is "absorption rate from gut to liver";
  QC has L_PER_HR; QC is "cardiac output";
  QL has L_PER_HR; QL is "blood flow to liver";
  QR has L_PER_HR; QR is "blood flow to rest-of-body";

  // Assignment rules:
  Blood := BW*VBc;
  Liver := BW*VLc;
  Rest := BW*VRc;
  deltaBW := BWRef/f_BW(AgeRef, BWBirth, BWAdult, kGrowth);
  BW := deltaBW*f_BW(Age, BWBirth, BWAdult, kGrowth);
  QC := QCC*BW^0.75;
  QL := QC*QLc;
  QR := QC*QRc;

  // Rate rules:
  Age' = 1/(24*365.25);

  // Reactions:
  _J0: AGut -> ALiver; AGut*Ka;
  _J1: ABlood -> ALiver; QL*ABlood/Blood;
  _J2: ALiver -> ABlood; QL*(ALiver/Liver)/PCLiver;
  _J3: ABlood -> ARest; QR*ABlood/Blood;
  _J4: ARest -> ABlood; QR*(ARest/Rest)/PCRest;
  _J5: ABlood -> AUrine; ABlood/Blood*CLUrine;

  // Unit definitions:
  unit MicroGM = 1e-6 gram;
  unit HR = 3600 second;
  unit L = litre;
  unit YR = 3.15576e7 second;
  unit KiloGM = 1000 gram;
  unit PER_HR = 1 / (3600 second);
  unit UNITLESS = dimensionless;
  unit L_PER_KiloGM = litre / (1000 gram);
  unit L_PER_HR_PER_KiloGM0P75 = litre / (3600 second * (1000 gram)^0.75);
  unit L_PER_HR = litre / (3600 second);
end
