// SBML level 3 version 2

model simple_metab()
  // model units - substance: MicroGM, time: HR, volume: L, extent: MicroGM

  // Compartments:
  compartment Gut = 1 L; Gut is "gut";
  compartment Blood; Blood has L; Blood is "blood";
  compartment Liver; Liver has L; Liver is "liver";
  compartment Rest; Rest has L; Rest is "rest-of-body";
  compartment Urine = 1 L; Urine is "urine";

  // Species:
  substanceOnly species AGut_P in Gut = 0; AGut_P is "amount in gut parent";
  substanceOnly species ALiver_P in Liver = 0; ALiver_P is "amount in liver parent";
  substanceOnly species ABlood_P in Blood = 0; ABlood_P is "amount in blood parent";
  substanceOnly species ARest_P in Rest = 0; ARest_P is "amount in rest-of-body parent";
  substanceOnly species AUrine_P in Urine = 0; AUrine_P is "amount in urine parent";
  substanceOnly species AGut_M in Gut = 0; AGut_M is "amount in gut metabolite";
  substanceOnly species ALiver_M in Liver = 0; ALiver_M is "amount in liver metabolite";
  substanceOnly species ABlood_M in Blood = 0; ABlood_M is "amount in blood metabolite";
  substanceOnly species ARest_M in Rest = 0; ARest_M is "amount in rest-of-body metabolite";
  substanceOnly species AUrine_M in Urine = 0; AUrine_M is "amount in urine metabolite";

  // Parameters:
  BW = 70 KiloGM; BW is "body weight";
  scVRest = 0.9003 L_PER_KiloGM; scVRest is "rest-of-body volume as fraction of body weight";
  scVLiver = 0.0257 L_PER_KiloGM; scVLiver is "liver volume as fraction of body weight";
  scVBlood = 0.074 L_PER_KiloGM; scVBlood is "blood volume as fraction of bodyweight";
  QCC = 15 L_PER_HR_PER_KiloGM0P75; QCC is "cardiac output as function of body weight";
  QRc = 0.773 UNITLESS; QRc is "fraction of blood flow to rest-of-body";
  QLc = 0.227 UNITLESS; QLc is "fraction of blood flow to liver";
  PCLiver_P = 2 UNITLESS; PCLiver_P is "partition coefficient liver over blood parent";
  PCRest_P = 1.2 UNITLESS; PCRest_P is "partition coefficient rest-of-body over blood parent";
  CLmet_P = 50 L_PER_HR; CLmet_P is "metabolic clearance rate";
  CLurine_P = 0 L_PER_HR; CLurine_P is "urinary excretion rate parent";
  Ka_P = 0.05 PER_HR; Ka_P is "absorption rate from gut to liver parent";
  PCLiver_M = 1.4 UNITLESS; PCLiver_M is "partition coefficient liver over blood metabolite";
  PCRest_M = 0.5 UNITLESS; PCRest_M is "partition coefficient rest-of-body over blood";
  CLurine_M = 20 L_PER_HR; CLurine_M is "urinary excretion rate metabolite";
  QBlood has L_PER_HR; QBlood is "blood flow rate";
  QLiver has L_PER_HR; QLiver is "blood flow to liver";
  QRest has L_PER_HR; QRest is "blood flow to rest-of-body";

  // Assignment rules:
  Blood := BW*scVBlood;
  Liver := BW*scVLiver;
  Rest := BW*scVRest;
  QBlood := QCC*BW^0.75;
  QLiver := QBlood*QLc;
  QRest := QBlood*QRc;

  // Reactions:
  _J0: AGut_P -> ALiver_P; AGut_P*Ka_P;
  _J1: ABlood_P -> ALiver_P; QLiver*ABlood_P/Blood;
  _J2: ALiver_P -> ABlood_P; QLiver*(ALiver_P/Liver)/PCLiver_P;
  _J3: ABlood_M -> ALiver_M; QLiver*ABlood_M/Blood;
  _J4: ALiver_M -> ABlood_M; QLiver*(ALiver_M/Liver)/PCLiver_M;
  _J5: ABlood_P -> ARest_P; QRest*ABlood_P/Blood;
  _J6: ARest_P -> ABlood_P; QRest*(ARest_P/Rest)/PCRest_P;
  _J7: ABlood_M -> ARest_M; QRest*ABlood_M/Blood;
  _J8: ARest_M -> ABlood_M; QRest*(ARest_M/Rest)/PCRest_M;
  _J9: ABlood_P -> AUrine_P; ABlood_P/Blood*CLurine_P;
  _J10: ABlood_M -> AUrine_M; ABlood_M/Blood*CLurine_M;
  _J11: ALiver_P -> ALiver_M; CLmet_P*(ALiver_P/Liver)/PCLiver_P;

  // Unit definitions:
  unit MicroGM = 1e-6 gram;
  unit HR = 3600 second;
  unit L = litre;
  unit KiloGM = 1000 gram;
  unit L_PER_KiloGM = litre / (1000 gram);
  unit L_PER_HR_PER_KiloGM0P75 = litre / (3600 second * (1000 gram)^0.75);
  unit UNITLESS = dimensionless;
  unit L_PER_HR = litre / (3600 second);
  unit PER_HR = 1 / (3600 second);
end
